New Line.Sw1    phases=3  Bus1=150r   Bus2=149        Switch=y    r1=1e-3 r0=1e-3 x1=1e-3 x0=0.000 c1=0.000 c0=0.000
New Line.Sw2    phases=3  Bus1=13     Bus2=152        switch=y    r1=1e-3 r0=1e-3 x1=1e-3 x0=0.000 c1=0.000 c0=0.000
New Line.Sw3    phases=3  Bus1=18     Bus2=135        switch=y    r1=1e-3 r0=1e-3 x1=1e-3 x0=0.000 c1=0.000 c0=0.000
New Line.Sw4    phases=3  Bus1=60     Bus2=160        switch=y    r1=1e-3 r0=1e-3 x1=1e-3 x0=0.000 c1=0.000 c0=0.000
New Line.Sw5    phases=3  Bus1=97     Bus2=197        switch=y    r1=1e-3 r0=1e-3 x1=1e-3 x0=0.000 c1=0.000 c0=0.000
New Line.Sw6    phases=3  Bus1=61     Bus2=61s        switch=y    r1=1e-3 r0=1e-3 x1=1e-3 x0=0.000 c1=0.000 c0=0.000

! NORMALLY OPEN SWITCHES; DEFINED AS SHORT LINE TO OPEN BUS SO WE CAN SEE OPEN POINT VOLTAGES.
! COULD ALSO BE DEFINED AS DISABLED OR THE TERMINCAL COULD BE OPENED AFTER BEING DEFINED

!New Line.sw7    phases=3  Bus1=151    Bus2=300      switch=y   r1=1e-3 r0=1e-3  x1=1e-3 x0=0.000 c1=0.000 c0=0.000
!New Line.sw8    phases=1  Bus1=54.1   Bus2=94.1      switch=y  r1=1e-3 r0=1e-3  x1=1e-3 x0=0.000 c1=0.000 c0=0.000
!open line.sw7
!open line.sw8
